// COMSOL Multiphysics 5.5.0.359 model "Sc_work_k.mph"
// Scatterer on Substrate
// modeldescr_woptics/scatterer_on_substrate
// A plane electromagnetic wave is incident on a gold nanoparticle on a dielectric substrate. The absorption and scattering cross sections of the particle are computed for a few different polar and azimuthal angles of incidence.
// Outline of the model tree

Parameters
  w = 300[nm]  // Width of physical geometry
  t_pml = 150[nm]  // PML thickness
  h_air = 400[nm]  // Air domain height
  h_subs = 250[nm]  // Substrate domain height
  na = 1  // Refractive index, air
  lda0 = 500[nm]  // Wavelength
  phi = 0  // Azimuthal angle of incidence in both media
  theta = 0  // Polar angle of incidence in air
  I0 = 1[MW/m^2]  // Intensity of incident field
  P = I0*w^2*cos(theta)  // Port power
  nb = 1
  wl = 0.8

Variables
  var1 "Variables 1" on selection com1
    ewfd.Ex = 0
    ewfd.Ey = 0
    ewfd.Ez = 0
  var2 "Variables 2" on boundaries 49, 52
    E0x = -sin(phi)
    E0y = cos(phi)
  var3 "Variables 3"
    nrelPoav = nx*ewfd2.relPoavx+ny*ewfd2.relPoavy+nz*ewfd2.relPoavz  // Relative normal Poynting flux
    sigma_sc = intop_surf(nrelPoav)/I0  // Scattering cross section
    sigma_abs = intop_vol(ewfd2.Qh)/I0  // Absorption cross section
    sigma_ext = sigma_sc+sigma_abs  // Extinction cross section

Selections
  sel1: Explicit "Physical Domains" on domains 14, 19
  com1: Complement "PML Domains" | entitydim = 3; input = {sel1}
  sel2: Explicit "Nanoparticle" on domains 19
  sel3: Explicit "Nanoparticle Surface" on boundaries adjacent to domains 19

Couplings
  intop1: Integration on selection sel2 | opname = intop_vol
  intop2: Integration on selection sel3 | opname = intop_surf

Probes
  var1: GlobalVariable "Global Variable Probe 1"
    expr = sigma_sc
    unit = m^2
    descr = Scattering cross section
    table = tbl11

Coordinate systems
  pml1: PML "Perfectly Matched Layer 1" on selection com1 | wavelengthSource = ewfd2

Geometry
  geom1 "Geometry 1" (3D, length unit m)
    blk1: Block
      base = center
      size = {w+2*t_pml, w+2*t_pml, w+2*t_pml}
      layername = Layer 1
      layer = t_pml
      layerleft = on
      layerright = on
      layerfront = on
      layerback = on
      layertop = on
    sph1: Sphere | r = 100 [nm]
    fin: Finalize "Form Union"

Materials
  mat1: Common "Air" on domains 1-28
    RefractiveIndex
      n = na
      ki = 0
  mat3: Common "SI" on selection sel2
    RefractiveIndex
      n = n_interp(c_const/freq)
      ki = k_interp(c_const/freq)
      int1: Interpolation "Refractive index"
        funcname = n_interp
        table = 
          {0.25, 1.637}
          {0.26, 1.737}
          {0.27, 2.03}
          {0.28, 2.84}
          {0.29, 4.185}
          {0.3, 5.049}
          {0.31, 5.091}
          {0.32, 5.085}
          {0.33, 5.135}
          {0.34, 5.245}
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        interp = piecewisecubic
        argunit = µm
        fununit = 1
      int2: Interpolation "Refractive index, imaginary part"
        funcname = k_interp
        table = 
          {0.25, 3.5889}
          {0.26, 3.9932}
          {0.27, 4.5958}
          {0.28, 5.1961}
          {0.29, 5.3124}
          {0.3, 4.29}
          {0.31, 3.6239}
          {0.32, 3.2824}
          {0.33, 3.0935}
          {0.34, 2.9573}
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        interp = piecewisecubic
        argunit = µm
        fununit = 1

Physics
  ewfd: ElectromagneticWavesFrequencyDomain on selection sel1
    dependent variable E = {Ex, Ey, Ez}
    wee1: WaveEquationElectric (default) | minput_temperature_src = fromCommonDef
    pec1: PerfectElectricConductor (default)
    init1: init "Initial Values 1" (default)
    wee2: WaveEquationElectric on selection sel2 | n_mat = userdef; n = na; ki_mat = userdef; ki = 0
    port1: Port on boundaries 52
      Pin = P
      PortType = Periodic
      Eampl = {E0x, E0y, 0}
      alpha1_inc = theta
      alpha2_inc = phi
      n = na
    port2: Port on boundaries 49 | PortType = Periodic; Eampl = {E0x, E0y, 0}; n = nb
    pc1: PeriodicCondition on boundaries 47, 88
      PeriodicType = Floquet
      Floquet_source = FromPeriodicPort
      destinationDomains: boundaries 88
    pc2: PeriodicCondition on boundaries 48, 58
      PeriodicType = Floquet
      Floquet_source = FromPeriodicPort
      destinationDomains: boundaries 58
  ewfd2: ElectromagneticWavesFrequencyDomain on all domains
    dependent variable E2 = {E2x, E2y, E2z}
    BackgroundField.SolveFor = scatteredField
    BackgroundField.Eb = {ewfd.Ex, ewfd.Ey, ewfd.Ez}
    wee1: WaveEquationElectric (default)
    pec1: PerfectElectricConductor (default)
    init1: init "Initial Values 1" (default)

Mesh
  mesh1 "Mesh 1"
    size: MeshSizeDefault | hmax = 6.0E-8; hmin = 1E-8
    size1: Size on domains 19 | hmax = 1.5E-8; hmin = 0.5E-8
    size2: Size on boundaries 47, 48, 58, 88 | hmax = 6.0E-8; hmin = 1E-8
    dis1: Distribution on edges 17, 20, 28, 31, 45, 48, 52, 58, 63, 67, 69, 70, 97, 100, 104, 109, 110, 112, 115, 119-123
      type = predefined
    ftri1: FreeTri "Free Triangular 1" on boundaries 47
    copy1: Copy | mesh = mesh1; source = boundaries 47; destination = boundaries 88
    ftri2: FreeTri "Free Triangular 2" on boundaries 48
    copy2: Copy | mesh = mesh1; source = boundaries 48; destination = boundaries 58
    ftet1: FreeTet "Free Tetrahedral 1" on domains 14, 19
    swe1: Sweep "Swept 1" on domains 1-13, 15-18, 20-28
      dis1: Distribution on domains 1-13, 15-18, 20-28
      dis2: Distribution on no domains | numelem = 8

Studies
  std1 "Study 1"
    param: Parametric "Parametric Sweep" | pname = wl; plistarr = range(0.7,0.1/9,0.8) range(0.7,0.1/10,0.8)
    wave: Wavelength "Wavelength Domain" | plist = wl; solve for = {ewfd}
    wave2: Wavelength "Wavelength Domain 2" | plist = wl; solve for = {ewfd2}

Solver configurations
  sol1 "Solution 1" (study std1)
    v1: Variables "Dependent Variables 1"
    s1: Stationary "Stationary Solver 1" | stol = 0.01
      p1: Parametric | pname = lambda0; plistarr = wl; punit = µm; pcontinuationmode = no
      fc1: FullyCoupled | linsolver = d1
      d1: Direct "Suggested Direct Solver (ewfd)"
    v2: Variables "Dependent Variables 2" | initmethod = sol; notsolmethod = sol
    s2: Stationary "Stationary Solver 2"
      p1: Parametric | pname = lambda0; plistarr = wl; punit = µm; pcontinuationmode = no
      fc1: FullyCoupled | linsolver = i1
      i1: Iterative "Suggested Iterative Solver (ewfd2)" | linsolver = bicgstab
        mg1: Multigrid
  sol2 "Parametric Solutions 1" (study std1)

Datasets
  dset1: Solution | solution = sol1
  dset2: Solution "Probe Solution 2" | solution = sol2
  dset3: Solution | solution = sol2

Derived values
  gev1: EvalGlobal "Global Variable Probe 1" | data = dset2; table = tbl11; expr = sigma_sc

Tables
  tbl11: Table "Probe Table 1"
    wl | lambda0 (µm) | Scattering cross section (m^2)
    0.7 | 0.7 | 1.17726e-13
    0.711111 | 0.711111 | 1.23051e-13
    0.722222 | 0.722222 | 1.35193e-13
    0.733333 | 0.733333 | 1.5795e-13
    0.744444 | 0.744444 | 1.96168e-13
    0.755556 | 0.755556 | 2.52641e-13
    0.766667 | 0.766667 | 3.01436e-13
    0.777778 | 0.777778 | 2.79516e-13
    0.788889 | 0.788889 | 2.05095e-13
    0.8 | 0.8 | 1.39418e-13
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
Plots
  pg1: PlotGroup1D "Probe Plot Group 1"
    tblp2: Table "Probe Table Graph 2" | table = tbl11; xaxisdata = auto; plotcolumns = 3